<?xml version="1.0"?>

<system name="catapult"
   xmlns:xsi="http://www.w3.org/2001/XMLSchema-instance"
   xsi:noNamespaceSchemaLocation="http://jsbsim.sourceforge.net/JSBSimSystem.xsd">
    <property>systems/catapult/cat-pos-norm</property>
    <property value="0">systems/holdback/holdback-cmd</property>
    <property>systems/holdback/launchbar-engaged</property>

    <channel name="Catapult">

       <switch name="systems/catapult/cat-cmd-norm">
          <default value="0"/>
          <test  logic="AND" value="0">
               systems/catapult/cat-pos-norm gt 0.999
          </test>
          <test  logic="AND" value="1">
               systems/catapult/cat-launch-cmd == 1
          </test>
          <output>systems/catapult/cat-launch-cmd</output>
       </switch>

       <kinematic name="systems/catapult/cat-timer">
          <input>systems/catapult/cat-cmd-norm</input>
          <traverse>
              <setting>
                 <position>0.0</position>
                 <time>0.0</time>
              </setting>
              <setting>
                 <position>1.0</position>
                 <time>2.7</time>
              </setting>
          </traverse>
          <output>systems/catapult/cat-pos-norm</output>
       </kinematic>

       <pure_gain name="systems/catapult/cat-force">
          <input>inertia/weight-lbs</input>
          <gain>3</gain>
       </pure_gain>

       <switch name="systems/catapult/cat-final">
           <default value="0"/>
           <test  logic="AND" value="systems/catapult/cat-force">
               systems/catapult/cat-launch-cmd == 1
               systems/catapult/cat-pos-norm lt 0.999
               systems/catapult/cat-pos-norm gt 0.0
               gear/unit[0]/WOW ne 0
           </test>
           <output>external_reactions/catapult/magnitude</output>
       </switch>

  </channel>

    <channel name="Holdback_Launchbar">

        <summer name="systems/holdback/total_thrust">
            <input>propulsion/engine/thrust-lbs</input>
            <input>propulsion/engine[1]/thrust-lbs</input>
        </summer>

        <switch name="systems/holdback/launchbar-engaged">
            <default value="0"/>
            <test  logic="AND" value="1">
                systems/holdback/holdback-cmd == 1
                systems/catapult/cat-launch-cmd eq 0
                gear/unit[0]/WOW ne 0
            </test>
            <test  logic="AND" value="1">
                systems/catapult/cat-launch-cmd ne 0
            </test>
            <output>systems/holdback/launchbar-engaged</output>
        </switch>

        <switch name="systems/holdback/nws-braking">
            <default value="0"/>
            <test  logic="AND" value="1">
                systems/holdback/launchbar-engaged == 1
                systems/catapult/cat-launch-cmd eq 0
            </test>
            <output>fcs/center-brake-cmd-norm</output>
        </switch>

        <switch name="systems/holdback/kneel">
            <default value="0"/>
            <test  logic="AND" value="0">
                systems/holdback/launchbar-engaged == 1
                systems/catapult/cat-launch-cmd eq 0
            </test>
        </switch>

        <switch name="systems/holdback/switch">
            <default value="0"/>
            <test  logic="AND" value="systems/holdback/total_thrust">
                systems/holdback/holdback-cmd == 1
            </test>
            <output>external_reactions/holdback/magnitude</output>
        </switch>

    </channel>
</system>
